Thu Jan 14 13:02:16 GMT 2010
/opt/intel/fc/9.0/bin/ifc
$PROB NM7 test 1
$INPUT SID SEX AGE RACE HT SMOK HCTZ PROP CON AMT WT TIME SECR
       DV DROP=RATE EVID SS II ID OCC
$DATA Data1 IGNORE=@
$SUBROUTINE ADVAN2 TRANS2
$PK
    TVCL=THETA(1)
    TVV=THETA(2)
    TVKA=THETA(3)
    CL=TVCL*EXP(ETA(1))
    V =TVV *EXP(ETA(2))
    KA=TVKA*EXP(ETA(3))
    S2=V
$THETA 18.7 87.3 2.13
$OMEGA .128 .142
$OMEGA 1.82
$ERROR
    IPRED = F
    IRES  = DV - F
    W     = F
    IF(W.EQ.0) W = 1
    IWRES = IRES/W
    Y     = IPRED + W*EPS(1)

$SIGMA  0.0231
$EST METHOD=ITS INTERACTION FILE=TestData1.EXT CTYPE=3
     NITER=1000 PRINT=5 NOABORT MSFO=testdata1.MSF NSIG=3 SIGL=6
$EST METHOD=SAEM NBURN=2000 NITER=500 PRINT=100
$COV MATRIX=R
$TABLE ID TIME IPRED IWRES WT ETA1
       NOPRINT ONEHEADER FILE=tab1

 WARNINGS AND ERRORS (IF ANY) FOR PROBLEM    1
 (WARNING  2) NM-TRAN INFERS THAT THE DATA ARE POPULATION.
 (DATA WARNING  5) RECORD         1, DATA ITEM 14, CONTENTS: 169.98
 THE DV DATA ITEM IS POSITIVE, BUT THE MDV DATA ITEM IS 1
 (DATA WARNING  5) RECORD        11, DATA ITEM 14, CONTENTS: 56.83
 THE DV DATA ITEM IS POSITIVE, BUT THE MDV DATA ITEM IS 1
 * THE MAXIMUM NUMBER OF WARNINGS OF ONE OR MORE TYPES WAS REACHED.
 IT IS POSSIBLE THAT SOME WARNING MESSAGES WERE SUPPRESSED.
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
1NONLINEAR MIXED EFFECTS MODEL PROGRAM (NONMEM) VERSION 7.1.0
 ORIGINALLY DEVELOPED BY STUART BEAL, LEWIS SHEINER, AND ALISON BOECKMANN
 CURRENT DEVELOPERS ARE ROBERT BAUER, ICON DEVELOPMENT SOLUTIONS,
 AND ALISON BOECKMANN. IMPLEMENTATION, EFFICIENCY, AND STANDARDIZATION
 PERFORMED BY NOUS INFOSYSTEMS.
 PROBLEM NO.:         1
 NM7 test 1
 TOT. NO. OF OBS RECS:      887
 TOT. NO. OF INDIVIDUALS:     99
 ONE COMPARTMENT MODEL WITH FIRST-ORDER ABSORPTION (ADVAN2)
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 #METH: Iterative Two Stage
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 Elapsed estimation time in seconds:    20.88

 #TERM:
 OPTIMIZATION COMPLETED


 ETABAR IS THE ARITHMETIC MEAN OF THE ETA-ESTIMATES,
 AND THE P-VALUE IS GIVEN FOR THE NULL HYPOTHESIS THAT THE TRUE MEAN IS 0.

 ETABAR:         4.1024E-03  8.9179E-02 -7.7223E-02
 SE:             3.7612E-02  3.5382E-02  7.2979E-02

 P VAL.:         9.1315E-01  1.1720E-02  2.8999E-01

 ETAshrink(%):   5.0139E+00  1.2173E+01  1.4998E+01
 EPSshrink(%):   1.2013E+01


 #TERE:
 Elapsed covariance time in seconds:     0.04

 ********************                               ITERATIVE TWO STAGE                              ********************
 #OBJT:**************                        FINAL VALUE OF OBJECTIVE FUNCTION                       ********************
 #OBJV:********************************************     3335.250       **************************************************

 ********************                               ITERATIVE TWO STAGE                              ********************
 ********************                             FINAL PARAMETER ESTIMATE                           ********************

 THETA - VECTOR OF FIXED EFFECTS PARAMETERS   *********
         TH 1      TH 2      TH 3
         2.00E+01  7.73E+01  1.27E+00

 OMEGA - COV MATRIX FOR RANDOM EFFECTS - ETAS  ********
            ETA1      ETA2      ETA3
 ETA1
+        1.57E-01
 ETA2
+        0.00E+00  1.62E-01
 ETA3
+        0.00E+00  0.00E+00  7.37E-01

 SIGMA - COV MATRIX FOR RANDOM EFFECTS - EPSILONS  ****
            EPS1
 EPS1
+        2.59E-02

 ********************                               ITERATIVE TWO STAGE                              ********************
 ********************                          STANDARD ERROR OF ESTIMATE (S)                        ********************

 THETA - VECTOR OF FIXED EFFECTS PARAMETERS   *********
         TH 1      TH 2      TH 3
         1.24E+00  7.71E+00  1.27E-01

 OMEGA - COV MATRIX FOR RANDOM EFFECTS - ETAS  ********
            ETA1      ETA2      ETA3
 ETA1
+        4.26E-02
 ETA2
+        0.00E+00  4.83E-02
 ETA3
+        0.00E+00  0.00E+00  2.01E-01

 SIGMA - COV MATRIX FOR RANDOM EFFECTS - EPSILONS  ****
            EPS1
 EPS1
+        7.46E-04

 ********************                               ITERATIVE TWO STAGE                              ********************
 ********************                        COVARIANCE MATRIX OF ESTIMATE (S)                       ********************

            TH 1      TH 2      TH 3      OM11      OM12      OM13      OM22      OM23      OM33      SG11
 TH 1
+        1.53E+00
 TH 2
+       -6.69E+00  5.94E+01
 TH 3
+        1.02E-03 -5.43E-02  1.62E-02
 OM11
+        6.53E-03  5.91E-02 -8.82E-04  1.82E-03
 OM12
+       ......... ......... ......... ......... .........
 OM13
+       ......... ......... ......... ......... ......... .........
 OM22
+       -6.55E-03 -1.40E-01  4.34E-04 -1.51E-03  0.00E+00  0.00E+00  2.33E-03
 OM23
+       ......... ......... ......... ......... ......... ......... ......... .........
 OM33
+       -7.94E-02  1.88E-01  1.17E-03 -1.98E-03  0.00E+00  0.00E+00  1.43E-03  0.00E+00  4.03E-02
 SG11
+       -2.30E-04  1.04E-03  2.73E-05 -1.23E-06  0.00E+00  0.00E+00  2.41E-07  0.00E+00 -4.54E-06  5.56E-07

 ********************                               ITERATIVE TWO STAGE                              ********************
 ********************                        CORRELATION MATRIX OF ESTIMATE (S)                      ********************

            TH 1      TH 2      TH 3      OM11      OM12      OM13      OM22      OM23      OM33      SG11
 TH 1
+        1.00E+00
 TH 2
+       -7.02E-01  1.00E+00
 TH 3
+        6.50E-03 -5.53E-02  1.00E+00
 OM11
+        1.24E-01  1.80E-01 -1.62E-01  1.00E+00
 OM12
+       ......... ......... ......... ......... .........
 OM13
+       ......... ......... ......... ......... ......... .........
 OM22
+       -1.10E-01 -3.77E-01  7.05E-02 -7.33E-01  0.00E+00  0.00E+00  1.00E+00
 OM23
+       ......... ......... ......... ......... ......... ......... ......... .........
 OM33
+       -3.20E-01  1.22E-01  4.57E-02 -2.32E-01  0.00E+00  0.00E+00  1.48E-01  0.00E+00  1.00E+00
 SG11
+       -2.50E-01  1.81E-01  2.88E-01 -3.88E-02  0.00E+00  0.00E+00  6.70E-03  0.00E+00 -3.03E-02  1.00E+00
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 #METH: Stochastic Approximation Expectation-Maximization
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 Elapsed estimation time in seconds:    80.91

 #TERM:
 STOCHASTIC PORTION COMPLETED
 REDUCED STOCHASTIC PORTION COMPLETED

 ETABAR IS THE ARITHMETIC MEAN OF THE ETA-ESTIMATES,
 AND THE P-VALUE IS GIVEN FOR THE NULL HYPOTHESIS THAT THE TRUE MEAN IS 0.

 ETABAR:         2.5872E-02  3.9740E-02 -1.2771E-01
 SE:             3.8049E-02  3.6135E-02  1.1297E-01

 P VAL.:         4.9652E-01  2.7143E-01  2.5828E-01

 ETAshrink(%):   7.2367E-02  6.4590E+00  5.1904E+00
 EPSshrink(%):  -1.0145E+01


 #TERE:

 ********************                STOCHASTIC APPROXIMATION EXPECTATION-MAXIMIZATION               ********************
 #OBJT:**************                        FINAL VALUE OF LIKELIHOOD FUNCTION                      ********************
 #OBJV:********************************************     2339.093       **************************************************

 ********************                STOCHASTIC APPROXIMATION EXPECTATION-MAXIMIZATION               ********************
 ********************                             FINAL PARAMETER ESTIMATE                           ********************

 THETA - VECTOR OF FIXED EFFECTS PARAMETERS   *********
         TH 1      TH 2      TH 3
         1.91E+01  7.67E+01  1.68E+00

 OMEGA - COV MATRIX FOR RANDOM EFFECTS - ETAS  ********
            ETA1      ETA2      ETA3
 ETA1
+        1.45E-01
 ETA2
+        0.00E+00  1.49E-01
 ETA3
+        0.00E+00  0.00E+00  1.42E+00

 SIGMA - COV MATRIX FOR RANDOM EFFECTS - EPSILONS  ****
            EPS1
 EPS1
+        2.66E-02
