Thu Feb 11 12:02:07 GMT 2010
$PROB System Test 1
$INPUT SID SEX AGE RACE HT SMOK HCTZ PROP CON DOSE=AMT WT TIME SECR
       DV DROP=RATE EVID SS II ID OCC
$DATA input.tab IGNORE=@
$PRED
  KA = THETA(1)
  KE = THETA(2)
  CL = THETA(3)
  F = (DOSE*KE*KA) /(CL * (KE-KA)) * (EXP(-KE*TIME) - EXP(-KA*TIME))
  Y = F + ERR(1)
  IPRED = F
  IWRES = F - DV

$THETA 18.7 FIX
87.3 FIX
2.13 FIX
$OMEGA  0.0231 FIX
$EST METHOD=0 MAXEVAL=0

1NONLINEAR MIXED EFFECTS MODEL PROGRAM (NONMEM)    DOUBLE PRECISION NONMEM    VERSION VI LEVEL 1.0
 DEVELOPED AND PROGRAMMED BY STUART BEAL AND LEWIS SHEINER
 PROBLEM NO.:         1
 System Test 1
 TOT. NO. OF OBS RECS:      22
 TOT. NO. OF INDIVIDUALS:   22
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
 ********************                           MINIMUM VALUE OF OBJECTIVE FUNCTION                  ********************
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
 ********************                                  FINAL PARAMETER ESTIMATE                      ********************

 THETA - VECTOR OF FIXED EFFECTS PARAMETERS   *********
            TH 1      TH 2      TH 3
         1.87E+01  8.73E+01  2.13E+00

 OMEGA - COV MATRIX FOR RANDOM EFFECTS - ETAS  ********
            ETA1
 ETA1
+        2.31E-02
